*Heading
** Job name: Ti13GN Model name: Ti13GN
** Generated by: Abaqus/CAE 2024
*Preprint, echo=NO, model=NO, history=NO, contact=NO
**
** PARTS
**
*Part, name=VORONOI3D
*Node
      1, 0.0199999996, 0.00940022524, 0.00830341782
      2, 0.0199999996,           0., 0.00607043039
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*Element, type=C3D8R
   1,  719,  720, 2725, 2659,   65,   66,  660,  659
   2,  720,  721, 2726, 2725,   66,   67,  661,  660
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*Nset, nset=SET-GRAIN-1
    1,    2,    3,    4,    5,    6
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*Elset, elset=SET-GRAIN-1, generate
   1,  315,    1
*Nset, nset=SET-GRAIN-2
    1,    2,    3,    4,    5,   15
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*Elset, elset=SET-GRAIN-2, generate
 316,  570,    1
*Nset, nset=SET-GRAIN-3
    3,    4,   10,   14,   17,   18
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*Elset, elset=SET-GRAIN-3, generate
 571,  874,    1
*Nset, nset=SET-GRAIN-4
    1,    5,    6,   13,   15,   19
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*Elset, elset=SET-GRAIN-4, generate
  875,  1205,     1
*Nset, nset=SET-GRAIN-5
    4,    5,   11,   12,   13,   14
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*Elset, elset=SET-GRAIN-5, generate
 1206,  1469,     1
*Nset, nset=SET-GRAIN-6
    7,    8,    9,   11,   12,   40
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*Elset, elset=SET-GRAIN-6, generate
 1470,  1841,     1
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*Elset, elset=_PICKEDSET16, internal, generate
    1,  4202,     1
** Section: Section-1-_PICKEDSET16
*Solid Section, elset=_PICKEDSET16, controls=EC-1, material=TI_POLYCRYSTAL
,
*End Part
**
**
** ASSEMBLY
**
*Assembly, name=Assembly
**
*Instance, name=VORONOI3D-1, part=VORONOI3D
*End Instance
**
*Node
      1, 0.00999999978, 0.00999999978, -0.00999999978
      2, 0.00999999978, 0.00999999978, 0.0299999993
*Elset, elset=ALL, instance=VORONOI3D-1, generate
    1,  4202,     1
*Nset, nset=_PICKEDSET6944, internal
 1,
*Nset, nset=_PICKEDSET6946, internal
 2,
*Nset, nset=_PICKEDSET6947, internal
 1,
*Nset, nset=_PICKEDSET6948, internal
 2,
*Elset, elset=__PICKEDSURF6943_S2, internal, instance=VORONOI3D-1
  316,  317,  318,  319,  320,  321
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*Elset, elset=__PICKEDSURF6943_S3, internal, instance=VORONOI3D-1
  688,  692,  696,  923,  924,  925
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*Elset, elset=__PICKEDSURF6943_S4, internal, instance=VORONOI3D-1
  574,  578,  582,  586,  590,  594
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*Elset, elset=__PICKEDSURF6945_S2, internal, instance=VORONOI3D-1
 2135, 2136, 2137, 2138, 2139, 2140
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*Elset, elset=__PICKEDSURF6945_S3, internal, instance=VORONOI3D-1
 1689, 1690, 1691, 1698, 1699, 1700
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*Elset, elset=__PICKEDSURF6945_S4, internal, instance=VORONOI3D-1
 1631, 1634, 1637, 1640, 1643, 1646
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*Elset, elset=__PICKEDSURF6943_S2_1, internal, instance=VORONOI3D-1
  316,  317,  318,  319,  320,  321
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*Elset, elset=__PICKEDSURF6943_S4_1, internal, instance=VORONOI3D-1
  574,  578,  582,  586,  590,  594
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*Elset, elset=__PICKEDSURF6943_S3_1, internal, instance=VORONOI3D-1
  688,  692,  696,  923,  924,  925
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*Surface, type=ELEMENT, name=_PICKEDSURF6943, internal
__PICKEDSURF6943_S2_1, S2
__PICKEDSURF6943_S4_1, S4
__PICKEDSURF6943_S3_1, S3
*Elset, elset=__PICKEDSURF6945_S4_1, internal, instance=VORONOI3D-1
 1631, 1634, 1637, 1640, 1643, 1646
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*Elset, elset=__PICKEDSURF6945_S3_1, internal, instance=VORONOI3D-1
 1689, 1690, 1691, 1698, 1699, 1700
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*Elset, elset=__PICKEDSURF6945_S2_1, internal, instance=VORONOI3D-1
 2135, 2136, 2137, 2138, 2139, 2140
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*Surface, type=ELEMENT, name=_PICKEDSURF6945, internal
__PICKEDSURF6945_S4_1, S4
__PICKEDSURF6945_S3_1, S3
__PICKEDSURF6945_S2_1, S2
** Constraint: CONSTRAINT-1
*Coupling, constraint name=CONSTRAINT-1, ref node=_PICKEDSET6944, surface=_PICKEDSURF6943
*Distributing, weighting method=UNIFORM
** Constraint: CONSTRAINT-2
*Coupling, constraint name=CONSTRAINT-2, ref node=_PICKEDSET6946, surface=_PICKEDSURF6945
*Distributing, weighting method=UNIFORM
*End Assembly
**
** ELEMENT CONTROLS
**
*Section Controls, name=EC-1, hourglass=ENHANCED
1., 1., 1.
**
** MATERIALS
**
*Material, name=TI_POLYCRYSTAL
*Depvar
    1300,
*User Material, constants=50, UNSYMM
  162200.,   91800.,   68800.,  180500.,   46700.,       0.,       0.,       0.
       0.,       0.,       0.,       0.,       0.,       0.,       0.,       0.
       0.,       0.,       0.,       0.,       0.,       0.,       0.,       0.
       1.,       0.,       0.,       0.,       1.,       0.,       0.,       0.
       0.,       0.,       0.,       0.,       0.,       0.,       0.,       0.
** ----------------------------------------------------------------
** ----------------------------------------------------------------
**
** STEP: Step-1
**
*Step, name=Step-1, nlgeom=YES, inc=1000000
*Static, stabilize=2e-4, allsdtol=0.05, continue=NO
0.05,  100, 0.0000000001, 1.0
** BOUNDARY CONDITIONS
**
** Name: Disp-BC-1 Type: Displacement/Rotation
*Boundary
_PICKEDSET6947, 1, 1
** Name: Disp-BC-2 Type: Displacement/Rotation
*Boundary
_PICKEDSET6947, 2, 2
** Name: Disp-BC-3 Type: Displacement/Rotation
*Boundary
_PICKEDSET6947, 3, 3
** Name: Disp-BC-4 Type: Displacement/Rotation
*Boundary
_PICKEDSET6948, 1, 1
** Name: Disp-BC-5 Type: Displacement/Rotation
*Boundary
_PICKEDSET6948, 2, 2
** Name: Disp-BC-6 Type: Displacement/Rotation
*Boundary
_PICKEDSET6948, 3, 3, 0.004
**
** OUTPUT REQUESTS
**
*Restart, write, frequency=0
**
** FIELD OUTPUT: F-Output-1
**
* Output, FIELD, frequency=1
*Element Output, directions=YES
S, LE, IVOL, SDV
**
** HISTORY OUTPUT: H-Output-1
**
*Output, history, variable=PRESELECT
*End Step
